# IGBT
# Perdida de conduccion
Vce := 1.25
rc_grafico := 1.25/15 = 0.0833333
Ic_avg := 0.703
Ic_RMS := 5.243
Pcondu := Vce*Ic_avg + rc_grafico*Ic_RMS^2 = 3.1695
# Perdida de conmutacion:
E_total := (2 + 3)*10^-3 = 0.005
f_sw := 20000
Pconmu := E_total*f_sw = 100
# Perdida total:
P_total_IGBT := Pcondu + Pconmu = 103.17
# Diodo Schottky
# Datos
Vf := 0.4
If := 2
T := 1/f_sw = 5e-5
ton := 0.315*T = 1.575e-5
Vr := 8
Ir := 0.4*10^-3
# Potencia on:
Pon := Vf*If*(ton/T) = 0.252
# Potencia off:
Poff := Vr*Ir*(ton/T) = 0.001008
# Potencia total
Potencia_diodo := Pon + Poff = 0.253008
