# Beneficios del inductor acoplado
# Datos
V_D := 0.72
Vin_min := 12
Vin := 12
Vin_max := 12
Pout := 5
Vout_max := 5
Vout := 5
Ripple_V := 0.1*Vout = 0.5
f_sw := 20000
eficiencia := 1
I_out := sqrt(Pout/8) = 0.790569
Pout_min := Vout*I_out = 3.95285
# Calculo de Duty Cicle
Duty := (Vout + V_D)/(Vin + Vout + V_D) = 0.322799
Duty_max := (Vout + V_D)/(Vin_min + Vout + V_D) = 0.322799
Duty_min := (Vout + V_D)/(Vin_max + Vout + V_D) = 0.322799
# Calculo inductancias
# Inductor acoplado:
Inductancia_acoplada := Vin_min^2*Duty_min^2/(2*f_sw*Pout_min*(1 + Duty_min*(1 - eficiencia)/eficiencia)) = 9.4898e-5
# Inductores separados:
L1 := Duty_min*Vin_max^2*eficiencia/(2*f_sw*Pout_min) = 0.000293985
L2 := (1 - Duty_min)*Vout^2/(2*f_sw*Pout_min) = 0.000107075
