2200 - (4*450) = 400
Ripple_Voltaje_conTransformador := 100*((5.0938 - 4.9016)/((5.0938 + 4.9016)/2)) = 3.84577
Ripple_Corriente_conTransformador := 100*((509.356 - 490.126)/((509.356 + 490.126)/2)) = 3.84799
Ripple_Voltaje_conInductor := 100*((4.6583 - 4.5657)/((4.6583 + 4.5657)/2)) = 2.00781
Ripple_Corriente_conInductor := 100*((465.757 - 456.517)/((465.757 + 456.517)/2)) = 2.00374
C_out_ESR := 0.08/(2*π*25000*100*10^-6) = 0.00509296
0.005093*2 = 0.010186
C_Cp_ESR := 0.5/(2*π*25000*2.2*10^-6) = 1.44686
C_in_ESR := 0.2/(2*π*25000*10*10^-6) = 0.127324
# Dibujo en paint coneccion SPWM, dibujo en paint conexion PWM, simulacion spice valores verdaderos
Ripple_voltaje := 100*((5.1297 - 4.8796)/((5.1297 + 4.8796)/2)) = 4.99735
(5.1297 + 4.8796)/2 = 5.00465
Ripple_corriente := 100*((513.496 - 487.892)/((513.496 + 487.892)/2)) = 5.1137
(513.496 + 487.892)/2 = 500.694
# Frecuencia 10k
1/10000 = 0.0001
(1/10000)*0.3 = 3e-5
(1/10000)*0.4 = 4e-5
(1/10000)*0.5 = 5e-5
(1/10000)*06 = 0.0006
# Frecuencia 20k
1/20000 = 5e-5
(1/20000)*0.3 = 1.5e-5
Duty := 0.30
(1/20000)*0.4 = 2e-5
Vout := 12*Duty/(1 - Duty) = 5.14286
(1/20000)*0.5 = 2.5e-5
(1/20000)*06 = 0.0003
# Frecuencia 30k
1/30000 = 3.33333e-5
(1/30000)*0.3 = 1e-5
(1/30000)*0.4 = 1.33333e-5
(1/30000)*0.5 = 1.66667e-5
(1/30000)*06 = 0.0002
Carga_gate := 198*10^-9
f_sw := 15000
Vg_on := 6.5
Vg_off := 4
Rg := 39
I_gate_promedio := Carga_gate*f_sw = 0.00297
Rg_int := (15 - 6)/2 = 4.5
15/0.35 = 42.8571
I_gate_peak := (Vg_on - Vg_off)/(Rg + Rg_int) = 0.0574713
Rg + Rg_int = 43.5
tiempo_en_cargar := Carga_gate/I_gate_peak = 3.4452e-6
tiempo_carga_segun_datasheet_IGBT := 80*10^-9 = 8e-8
Resistencia_carga := 15^2/5 = 45
