V_D := 0.525
Vin_min := 1.2
Vin := 12
Vin_max := 12
Pout := 5
Vout_max := 5
Vout := 5
Ripple_V := 0.01*Vout = 0.05
f_sw := 20000
I_out := sqrt(Pout/10) = 0.707107
Resistencia := Vout^2/Pout
Potencia := Vout^2/10 = 2.5
# Calculo de Duty Cicle
Duty := (Vout + V_D)/(Vin + Vout + V_D) = 0.315264
Duty_max := (Vout + V_D)/(Vin_min + Vout + V_D) = 0.821561
Duty_min := (Vout + V_D)/(Vin_max + Vout + V_D) = 0.315264
3.287*10^-3*10^-3 = 3.287e-6
3.287*10^-3*10^-1.0 = 0.0003287
0.003287 = 0.003287
# Seleccion inductor
Ripple_I_inductor := I_out*Vout/Vin_min*0.10 = 0.294628
I_peak_inductor1 := I_out*(Vout + V_D)/Vin_min*(1 + 0.1/2) = 3.41842
I_peak_inductor2 := I_out*(1 + 0.1/2) = 0.742462
L_inductancia_coupled_2013 := Vin_min*Duty_max/(2*Ripple_I_inductor*f_sw) = 8.36541e-5
# Corriente Peak Q1:
# Seleccion de diodo
I_peak_Q1 := I_peak_inductor1 + I_peak_inductor2 = 4.16088
Reverse_voltage_diode := Vin_max + Vout_max = 17
# Seleccion capacitor Cp
I_RMS_Q1 := I_out*sqrt((Vout + Vin_min + V_D)*(Vout + V_D)/Vin_min^2) = 3.59183
I_RMS_Cp := I_out*sqrt((Vout + V_D)/Vin_min) = 1.51726
# El capacitor de al medio debe aguantar
# este valor RMS de corriente
# El capacitor debe aguantar igual o más que 25[V DC]
Cp := 2.2*10^-6
Ripple_V_Cp := I_out*Duty_max/(Cp*f_sw) = 13.203
# Y los capacitores tienen que tener el siguiente valor:
C_mitad := 2*Cp = 4.4e-6
# Seleccion capacitor de salida
# El capacitor debe ser capaz de resistir esta corriente (en rms)
I_Cout_rms := I_out*sqrt((Vout + V_D)/Vin_min) = 1.51726  # El capacitor debe aguantar esta corriente RMS
# El ESR (resistencia serie equivalente) debe ser menor o igual a este valor
ESR_Cout := Ripple_V*0.5/(I_peak_inductor1 + I_peak_inductor2) = 0.00600834
# El valor de la capacitancia deberia ser mayor o igual a este valor
Cout := I_out*Duty/(Ripple_V*0.5*f_sw) = 0.00044585
# Los capacitores tienen que tener un valor mayor al siguiente:
C_salida := 2*Cout = 0.000891701
# Seleccion capacitancia de entrada
# En general se usa un capacitor de valor de 10uF o mayor, y que sea de buena calidad, y
# que pueda soportar esta corriente RMS
I_RMS_Cin := Ripple_I_inductor/sqrt(12) = 0.0850517
Cp_ESR := 1.447
R_L1 := 0.21/2
R_L2 := 0.21/2
R_sw := 1.25/15
Ai := (Vout + V_D)/Vin = 0.460417
Aa := (Vout + V_D + I_out*(Ai*Cp_ESR + R_L2))/(Vin - Ai*I_out*(R_L1 + R_sw) - R_sw*I_out) = 0.510981
Eficiencia := Vout*100/(Aa*Vin) = 81.5424
