# Datos:
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Carga_gate := 198*10^-9
f_sw := 20000
Vg_on := 6.5
Vg_off := 4
Rg := 39
# Las siguientes ecuaciones vienen del PDF AN-7004_IGBT_Driver_Calculation_rev00
I_gate_promedio := Carga_gate*f_sw = 0.00396
I_gate_peak := (Vg_on - Vg_off)/Rg = 0.0641026
tiempo_en_cargar := Carga_gate/I_gate_peak = 3.0888e-6
tiempo_carga_segun_datasheet_IGBT := 75*10^-9 = 7.5e-8
tiempo_descarga_segun_datasheet_IGBT := 650*10^-9 = 6.5e-7
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